Thu Aug  8 15:15:41 EDT 2024
; model from: https://www.ncbi.nlm.nih.gov/pmc/articles/PMC7894400/
$PROBLEM lorlatinib 2-cmt analytical w/ autoinduction

$INPUT  REC ID TIME EVID CMT AMT II ADDL RATE DV MDV BALB BWT
        DOSCUMA DOSCUMN PDOSAMT PPI ROUT SD TAPD TDOSE TPDOS WNCL

$DATA ../../derived_data/simulated_nonmem_dataset_mod_lorlatinib.csv IGNORE=@
$SUBROUTINE ADVAN4 TRANS4
$PK

;covariates
; typical: BWT=70; PPI=0; WNCL=100; BALB=4; TDOSE=100; PPI=0
IF(PPI.EQ.0) KAPPI = 1  ; Most common
IF(PPI.EQ.1) KAPPI = ( 1 + THETA(15))
KACOV=KAPPI
CLWNCL = ((WNCL/100.00)**THETA(14))
CLTDOSE = ( 1 + THETA(13)*(TDOSE - 100.00))
CLBALB = ( 1 + THETA(12)*(BALB - 4.00))
CLCOV=CLBALB*CLTDOSE*CLWNCL

; model

TVCLI = THETA(1) * ((BWT / 70) ** 0.75)
TVV2 = THETA(2) * (BWT / 70)

TVKA = THETA(3)
TVKA = KACOV * TVKA

TVQ = THETA(4)
TVV3 = THETA(5)
TVIN = THETA(6)
TVD1 = THETA(7)
TVF1 = THETA(8)
TVCLMX = THETA(9) * ((BWT / 70) ** 0.75)

V2 =  TVV2 * EXP(ETA(3))
KA = EXP(TVKA + ETA(5))
Q = TVQ
V3 = TVV3 * EXP(ETA(4))
IND = TVIN
D1 = TVD1
F1 = TVF1 * EXP(ETA(2))
TVCL = TVCLI
IF(SD.NE.1) TVCL = TVCLMX * (1 - EXP(-IND * (TIME+0.0001)))

TVCL = CLCOV * TVCL
CL = TVCL * EXP(ETA(1))

S2 = V2 / 1000

$ERROR
IPRD=F
IF(IPRD.LE.0)IPRD=0.0001
IPRED=LOG(IPRD)
IRES=DV-IPRED

IF(ROUT.EQ.28) THEN
W= SQRT(THETA(10)**2)
ELSE
W= SQRT(THETA(11)**2)
ENDIF

IWRES=IRES/W
Y = IPRED+W*ERR(1)

$THETA
 (0,9.035) ; CLI
 (0,120.511) ; V2
 (1.13) ; KA
 (0,22.002) ; Q
 (0,154.905) ; V3
 (0,0.020) ; IND
 (0,1.148) ; D1
 (0,0.759,1) ; F1
 (14.472) ; CLMX
 (0.11) ; prop error for IV
 (0.438) ; prop error for PO
 (0.067) ; CLBALB1
 (0.00138 FIX) ; CLTDOSE1 ;  TDOSE, total daily lorlatinib dose
 (0.235) ; CLWNCL1  ;WNCL, baseline standardized creatinine clearance
 (-0.2) ; KAPPI1
$OMEGA  BLOCK(2)
 0.030  ; CL
 0.005 0.022  ; F1
$OMEGA  BLOCK(2)
 0.086 ;V2
 0.01 0.101  ; V3
$OMEGA  2.32  ; KA
$SIGMA  1  FIX

;$SIMULATION (123456) ONLY

;$ESTIMATION METHOD=COND INTER MAXEVAL=9999 NOABORT NSIG=2 SIGL=6
;                PRINT=5 POSTHOC

$ESTIMATION METHOD=SAEM INTERACTION AUTO=1 NBURN=500 NITER=250
            SEED=231023 PRINT=5 RANMETHOD=P

$ESTIMATION METHOD=IMP INTERACTION AUTO=1 EONLY=1 NITER=20 SEED=231023
            PRINT=1 RANMETHOD=P

$COVARIANCE COMPRESS PRINT=E UNCONDITIONAL
$TABLE  ID TIME CMT ROUT BWT WNCL PPI BALB TDOSE
        CL TVCLI TVCLMX V2 KA Q V3 D1 F1 IND TIME
        ETA1 ETA2 ETA3 ETA4 ETA5
        ONEHEADER NOPRINT  FILE=mod_lorlatinib_estimate.ext

NM-TRAN MESSAGES
 WARNINGS AND ERRORS (IF ANY) FOR PROBLEM    1
 (WARNING  2) NM-TRAN INFERS THAT THE DATA ARE POPULATION.
 LIM VALUES MAXLIM ASSESSED BY NMTRAN: 1,2,3,4,5,6,7,8,10,11,13,15,16

1NONLINEAR MIXED EFFECTS MODEL PROGRAM (NONMEM) VERSION 7.5.0
 ORIGINALLY DEVELOPED BY STUART BEAL, LEWIS SHEINER, AND ALISON BOECKMANN
 CURRENT DEVELOPERS ARE ROBERT BAUER, ICON DEVELOPMENT SOLUTIONS,
 AND ALISON BOECKMANN. IMPLEMENTATION, EFFICIENCY, AND STANDARDIZATION
 PERFORMED BY NOUS INFOSYSTEMS.
 PROBLEM NO.:         1
 lorlatinib 2-cmt analytical w/ autoinduction
 TOT. NO. OF OBS RECS:      900
 TOT. NO. OF INDIVIDUALS:       40
 TWO COMPARTMENT MODEL WITH FIRST-ORDER ABSORPTION (ADVAN4)
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 #TBLN:      1
 #METH: Stochastic Approximation Expectation-Maximization (No Prior)
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
 #TERM:
 STOCHASTIC PORTION WAS NOT COMPLETED
 REDUCED STOCHASTIC PORTION WAS COMPLETED

 ETABAR IS THE ARITHMETIC MEAN OF THE ETA-ESTIMATES,
 AND THE P-VALUE IS GIVEN FOR THE NULL HYPOTHESIS THAT THE TRUE MEAN IS 0.

 ETABAR:         1.4814E-02 -2.2012E-02 -9.3522E-03  2.4183E-02 -1.6849E-01
 SE:             2.4822E-02  1.5123E-02  4.2622E-02  4.0847E-02  2.6969E-01
 N:                      40          40          40          40          40

 P VAL.:         5.5064E-01  1.4553E-01  8.2632E-01  5.5382E-01  5.3214E-01

 ETASHRINKSD(%)  7.1497E-01  4.2656E+00  3.0133E-01  5.7551E-01  1.3209E+00
 ETASHRINKVR(%)  1.4248E+00  8.3493E+00  6.0175E-01  1.1477E+00  2.6243E+00
 EBVSHRINKSD(%)  2.7579E-01  1.7711E+00  2.4091E-01  1.3894E-01  8.3572E-01
 EBVSHRINKVR(%)  5.5083E-01  3.5109E+00  4.8125E-01  2.7769E-01  1.6645E+00
 RELATIVEINF(%)  9.9588E+01  9.6525E+01  9.9490E+01  9.9731E+01  9.8330E+01
 EPSSHRINKSD(%)  1.6301E+01
 EPSSHRINKVR(%)  2.9945E+01


 TOTAL DATA POINTS NORMALLY DISTRIBUTED (N):          900
 N*LOG(2PI) CONSTANT TO OBJECTIVE FUNCTION:    1654.0893597684108
 OBJECTIVE FUNCTION VALUE WITHOUT CONSTANT:   -11878.026151962089
 OBJECTIVE FUNCTION VALUE WITH CONSTANT:      -10223.936792193679
 REPORTED OBJECTIVE FUNCTION DOES NOT CONTAIN CONSTANT

 TOTAL EFFECTIVE ETAS (NIND*NETA):                           200
 NIND*NETA*LOG(2PI) CONSTANT TO OBJECTIVE FUNCTION:    367.57541328186909
 OBJECTIVE FUNCTION VALUE WITHOUT CONSTANT:   -11878.026151962089
 OBJECTIVE FUNCTION VALUE WITH CONSTANT:      -11510.450738680220
 REPORTED OBJECTIVE FUNCTION DOES NOT CONTAIN CONSTANT


 #TERE:
 Elapsed estimation  time in seconds:    26.25
 Elapsed covariance  time in seconds:     0.00

 ********************           STOCHASTIC APPROXIMATION EXPECTATION-MAXIMIZATION (NO PRIOR)         ********************
 #OBJT:**************                        FINAL VALUE OF LIKELIHOOD FUNCTION                      ********************
 #OBJV:********************************************   -11878.026       **************************************************

 ********************           STOCHASTIC APPROXIMATION EXPECTATION-MAXIMIZATION (NO PRIOR)         ********************
 ********************                             FINAL PARAMETER ESTIMATE                           ********************

 THETA - VECTOR OF FIXED EFFECTS PARAMETERS   *********
         TH 1      TH 2      TH 3      TH 4      TH 5      TH 6      TH 7      TH 8      TH 9      TH10      TH11      TH12
          TH13      TH14      TH15
         9.46E+00  1.21E+02  8.34E-01  2.20E+01  1.54E+02  2.00E-02  1.15E+00  8.28E-01  1.45E+01  2.80E-04  2.75E-03  7.06E-02
          1.38E-03  1.01E-01  4.06E-01

 OMEGA - COV MATRIX FOR RANDOM EFFECTS - ETAS  ********
         ETA1      ETA2      ETA3      ETA4      ETA5
 ETA1
+        2.56E-02
 ETA2
+        2.85E-03  1.02E-02
 ETA3
+        0.00E+00  0.00E+00  7.50E-02
 ETA4
+        0.00E+00  0.00E+00  2.69E-02  6.92E-02
 ETA5
+        0.00E+00  0.00E+00  0.00E+00  0.00E+00  3.06E+00

 SIGMA - COV MATRIX FOR RANDOM EFFECTS - EPSILONS  ****
         EPS1
 EPS1
+        1.00E+00

 OMEGA - CORR MATRIX FOR RANDOM EFFECTS - ETAS  *******
         ETA1      ETA2      ETA3      ETA4      ETA5
 ETA1
+        1.60E-01
 ETA2
+        1.76E-01  1.01E-01
 ETA3
+        0.00E+00  0.00E+00  2.74E-01
 ETA4
+        0.00E+00  0.00E+00  3.73E-01  2.63E-01
 ETA5
+        0.00E+00  0.00E+00  0.00E+00  0.00E+00  1.75E+00

 SIGMA - CORR MATRIX FOR RANDOM EFFECTS - EPSILONS  ***
         EPS1
 EPS1
+        1.00E+00

 ********************           STOCHASTIC APPROXIMATION EXPECTATION-MAXIMIZATION (NO PRIOR)         ********************
 ********************                          STANDARD ERROR OF ESTIMATE (S)                        ********************

 THETA - VECTOR OF FIXED EFFECTS PARAMETERS   *********
         TH 1      TH 2      TH 3      TH 4      TH 5      TH 6      TH 7      TH 8      TH 9      TH10      TH11      TH12
          TH13      TH14      TH15
         2.56E-03  3.78E-02  8.16E-03  7.99E-03  1.94E-01  1.20E-05  2.09E-03  1.23E-03  6.70E-03  1.51E-05  4.78E-05  2.42E-04
          0.00E+00  7.14E-04  1.84E-02

 OMEGA - COV MATRIX FOR RANDOM EFFECTS - ETAS  ********
         ETA1      ETA2      ETA3      ETA4      ETA5
 ETA1
+        7.62E-03
 ETA2
+        3.92E-03  2.65E-03
 ETA3
+        0.00E+00  0.00E+00  3.08E-02
 ETA4
+        0.00E+00  0.00E+00  1.85E-02  2.18E-02
 ETA5
+        0.00E+00  0.00E+00  0.00E+00  0.00E+00  1.22E+00

 SIGMA - COV MATRIX FOR RANDOM EFFECTS - EPSILONS  ****
         EPS1
 EPS1
+        0.00E+00

 OMEGA - CORR MATRIX FOR RANDOM EFFECTS - ETAS  *******
         ETA1      ETA2      ETA3      ETA4      ETA5
 ETA1
+        2.38E-02
 ETA2
+        2.50E-01  1.31E-02
 ETA3
+       ......... .........  5.62E-02
 ETA4
+       ......... .........  2.15E-01  4.15E-02
 ETA5
+       ......... ......... ......... .........  3.49E-01

 SIGMA - CORR MATRIX FOR RANDOM EFFECTS - EPSILONS  ***
         EPS1
 EPS1
+       .........
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
 ********************           STOCHASTIC APPROXIMATION EXPECTATION-MAXIMIZATION (NO PRIOR)         ********************
 ********************                    EIGENVALUES OF COR MATRIX OF ESTIMATE (S)                   ********************

             1         2         3         4         5         6         7         8         9        10        11        12
             13        14        15        16        17        18        19        20        21
         4.64E-02  9.42E-02  1.02E-01  1.28E-01  1.72E-01  2.23E-01  3.06E-01  3.69E-01  4.59E-01  5.29E-01  6.03E-01  6.22E-01
          6.62E-01  8.21E-01  1.03E+00  1.28E+00  1.55E+00  1.68E+00  2.67E+00  2.83E+00  4.83E+00
 #TBLN:      2
 #METH: Objective Function Evaluation by Importance Sampling (No Prior)
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
 #TERM:
 EXPECTATION ONLY PROCESS WAS COMPLETED

 ETABAR IS THE ARITHMETIC MEAN OF THE ETA-ESTIMATES,
 AND THE P-VALUE IS GIVEN FOR THE NULL HYPOTHESIS THAT THE TRUE MEAN IS 0.

 ETABAR:         7.9451E-03 -3.0318E-02 -1.6435E-02  1.5223E-02 -1.5017E-01
 SE:             2.5654E-02  1.5390E-02  4.3204E-02  4.1129E-02  1.6504E-01
 N:                      40          40          40          40          40

 P VAL.:         7.5679E-01  4.8837E-02  7.0365E-01  7.1128E-01  3.6287E-01

 ETASHRINKSD(%)  1.0000E-10  2.5795E+00  1.0000E-10  1.0000E-10  3.9612E+01
 ETASHRINKVR(%)  1.0000E-10  5.0925E+00  1.0000E-10  1.0000E-10  6.3533E+01
 EBVSHRINKSD(%)  2.9599E-01  2.2974E+01  1.9126E-01  9.7892E-02  2.2779E+01
 EBVSHRINKVR(%)  5.9111E-01  4.0670E+01  3.8215E-01  1.9569E-01  4.0369E+01
 RELATIVEINF(%)  9.9653E+01  5.8233E+01  9.9592E+01  9.9813E+01  5.9606E+01
 EPSSHRINKSD(%)  3.9224E+01
 EPSSHRINKVR(%)  6.3063E+01


 TOTAL DATA POINTS NORMALLY DISTRIBUTED (N):          900
 N*LOG(2PI) CONSTANT TO OBJECTIVE FUNCTION:    1654.0893597684108
 OBJECTIVE FUNCTION VALUE WITHOUT CONSTANT:   -9974.4721414827491
 OBJECTIVE FUNCTION VALUE WITH CONSTANT:      -8320.3827817143392
 REPORTED OBJECTIVE FUNCTION DOES NOT CONTAIN CONSTANT

 TOTAL EFFECTIVE ETAS (NIND*NETA):                           200


 #TERE:
 Elapsed estimation  time in seconds:     0.68

 Number of Negative Eigenvalues in Matrix=           6
 Most negative value=  -54055200.058318146
 Most positive value=   19758581055.639114
 Forcing positive definiteness
 Root mean square deviation of matrix from original=    5.0923948935875001E-003

 Elapsed covariance  time in seconds:    21.55

 ********************         OBJECTIVE FUNCTION EVALUATION BY IMPORTANCE SAMPLING (NO PRIOR)        ********************
 #OBJT:**************                        FINAL VALUE OF OBJECTIVE FUNCTION                       ********************
 #OBJV:********************************************    -9974.472       **************************************************

 ********************         OBJECTIVE FUNCTION EVALUATION BY IMPORTANCE SAMPLING (NO PRIOR)        ********************
 ********************                             FINAL PARAMETER ESTIMATE                           ********************

 THETA - VECTOR OF FIXED EFFECTS PARAMETERS   *********
         TH 1      TH 2      TH 3      TH 4      TH 5      TH 6      TH 7      TH 8      TH 9      TH10      TH11      TH12
          TH13      TH14      TH15
         9.46E+00  1.21E+02  8.34E-01  2.20E+01  1.54E+02  2.00E-02  1.15E+00  8.28E-01  1.45E+01  2.80E-04  2.75E-03  7.06E-02
          1.38E-03  1.01E-01  4.06E-01

 OMEGA - COV MATRIX FOR RANDOM EFFECTS - ETAS  ********
         ETA1      ETA2      ETA3      ETA4      ETA5
 ETA1
+        2.56E-02
 ETA2
+        2.85E-03  1.02E-02
 ETA3
+        0.00E+00  0.00E+00  7.50E-02
 ETA4
+        0.00E+00  0.00E+00  2.69E-02  6.92E-02
 ETA5
+        0.00E+00  0.00E+00  0.00E+00  0.00E+00  3.06E+00

 SIGMA - COV MATRIX FOR RANDOM EFFECTS - EPSILONS  ****
         EPS1
 EPS1
+        1.00E+00

 OMEGA - CORR MATRIX FOR RANDOM EFFECTS - ETAS  *******
         ETA1      ETA2      ETA3      ETA4      ETA5
 ETA1
+        1.60E-01
 ETA2
+        1.76E-01  1.01E-01
 ETA3
+        0.00E+00  0.00E+00  2.74E-01
 ETA4
+        0.00E+00  0.00E+00  3.73E-01  2.63E-01
 ETA5
+        0.00E+00  0.00E+00  0.00E+00  0.00E+00  1.75E+00

 SIGMA - CORR MATRIX FOR RANDOM EFFECTS - EPSILONS  ***
         EPS1
 EPS1
+        1.00E+00

 ********************         OBJECTIVE FUNCTION EVALUATION BY IMPORTANCE SAMPLING (NO PRIOR)        ********************
 ********************                         STANDARD ERROR OF ESTIMATE (RSR)                       ********************

 THETA - VECTOR OF FIXED EFFECTS PARAMETERS   *********
         TH 1      TH 2      TH 3      TH 4      TH 5      TH 6      TH 7      TH 8      TH 9      TH10      TH11      TH12
          TH13      TH14      TH15
         6.31E-03  3.16E-02  7.28E-03  4.36E-03  1.23E-01  1.03E-05  2.97E-03  1.09E-02  6.85E-03  1.96E-05  1.41E-03  1.12E-03
          0.00E+00  5.50E-03  2.09E-02

 OMEGA - COV MATRIX FOR RANDOM EFFECTS - ETAS  ********
         ETA1      ETA2      ETA3      ETA4      ETA5
 ETA1
+        7.15E-03
 ETA2
+        3.77E-03  1.79E-03
 ETA3
+        0.00E+00  0.00E+00  1.66E-02
 ETA4
+        0.00E+00  0.00E+00  1.44E-02  1.65E-02
 ETA5
+        0.00E+00  0.00E+00  0.00E+00  0.00E+00  1.31E+00

 SIGMA - COV MATRIX FOR RANDOM EFFECTS - EPSILONS  ****
         EPS1
 EPS1
+        0.00E+00

 OMEGA - CORR MATRIX FOR RANDOM EFFECTS - ETAS  *******
         ETA1      ETA2      ETA3      ETA4      ETA5
 ETA1
+        2.23E-02
 ETA2
+        2.37E-01  8.83E-03
 ETA3
+       ......... .........  3.03E-02
 ETA4
+       ......... .........  1.44E-01  3.13E-02
 ETA5
+       ......... ......... ......... .........  3.73E-01

 SIGMA - CORR MATRIX FOR RANDOM EFFECTS - EPSILONS  ***
         EPS1
 EPS1
+       .........
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
 ********************         OBJECTIVE FUNCTION EVALUATION BY IMPORTANCE SAMPLING (NO PRIOR)        ********************
 ********************                   EIGENVALUES OF COR MATRIX OF ESTIMATE (RSR)                  ********************

             1         2         3         4         5         6         7         8         9        10        11        12
             13        14        15        16        17        18        19        20        21
         4.89E-05  1.04E-04  3.76E-04  6.29E-04  1.62E-03  3.98E-03  1.51E-02  1.88E-02  3.87E-02  8.18E-02  1.74E-01  2.17E-01
          2.92E-01  4.40E-01  4.70E-01  6.78E-01  9.74E-01  1.50E+00  1.95E+00  4.28E+00  9.86E+00
 Elapsed postprocess time in seconds:     0.07

0ERROR IN OPENING FILE : UNIT9 TABLE FILE USED IN OUTPT
 #CPUT: Total CPU Time in Seconds,      344.358
