Sun Aug  6 11:07:31 EDT 2023
$PROBLEM    Like 001,with xgxr2,advan2
$INPUT      ROW ID NOMTIME TIME EVID CMT AMT DV FLAG STUDY BLQ CYCLE
            DOSE PART PROFDAY PROFTIME WEIGHTB eff0
$DATA      xgxr2.csv IGNORE=@ IGNORE=(FLAG.NE.0) IGNORE(DOSE.LT.30)
$SUBROUTINE ADVAN2 TRANS2
$PK
TVKA=THETA(1)
TVV=THETA(2)
TVCL=THETA(3)

KA=TVKA*EXP(ETA(1))
V=TVV*EXP(ETA(2))
CL=TVCL*EXP(ETA(3))

$ERROR
  IPRED=F
  IRES=DV-IPRED

  IF (IPRED.GT.1) THEN
    W = SQRT(IPRED**2*SIGMA(1,1)**2 + SIGMA(2,2)**2)
  ELSE
    W=1
  ENDIF

  IWRES=IRES/W
  Y=F+F*ERR(1)+ERR(2)

;-----------------------INITIAL ESTIMATES---------------------------------
$THETA  (0,0.9) ; POPKA
$THETA  (0,.2) ; POPCL
$THETA  (0,3.6) ; POPV2
$OMEGA  0.1
$OMEGA  0.1
$OMEGA  0.1
$SIGMA  0  FIX
$SIGMA  .2
$ESTIMATION METHOD=1 POSTHOC INTER MAXEVAL=9999 NSIG=2 SIGL=9 PRINT=10
            NOABORT
$COVARIANCE
$TABLE      ROW TVKA TVV TVCL KA V CL PRED IPRED NOPRINT
            FILE=xgxr017_res.txt

NM-TRAN MESSAGES
 WARNINGS AND ERRORS (IF ANY) FOR PROBLEM    1
 (WARNING  2) NM-TRAN INFERS THAT THE DATA ARE POPULATION.
 (WARNING  23) $PK DOES NOT DEFINE A SCALE PARAMETER FOR THE CENTRAL
 COMPARTMENT.  WITH THIS TRANS, IT MAY NOT BE POSSIBLE TO SEPARATELY
 OBTAIN ESTIMATES OF PARAMETERS AFFECTING CLEARANCE AND VOLUME.
 (WARNING  79) SIGMA IS USED ON THE RIGHT. WITH A SUBSEQUENT RUN, IF AN
 INITIAL ESTIMATE OF A DIAGONAL BLOCK OF SIGMA IS TO BE COMPUTED BY
 NONMEM, THAT BLOCK WILL BE SET TO AN IDENTITY MATRIX DURING THAT
 COMPUTATION. THIS COULD LEAD TO AN ARITHMETIC EXCEPTION.*
 * THE MAXIMUM NUMBER OF WARNINGS OF ONE OR MORE TYPES WAS REACHED.
 IT IS POSSIBLE THAT SOME WARNING MESSAGES WERE SUPPRESSED.

1NONLINEAR MIXED EFFECTS MODEL PROGRAM (NONMEM) VERSION 7.5.0
 ORIGINALLY DEVELOPED BY STUART BEAL, LEWIS SHEINER, AND ALISON BOECKMANN
 CURRENT DEVELOPERS ARE ROBERT BAUER, ICON DEVELOPMENT SOLUTIONS,
 AND ALISON BOECKMANN. IMPLEMENTATION, EFFICIENCY, AND STANDARDIZATION
 PERFORMED BY NOUS INFOSYSTEMS.
 PROBLEM NO.:         1
 Like 001,with xgxr2,advan2
 TOT. NO. OF OBS RECS:      641
 TOT. NO. OF INDIVIDUALS:       90
 ONE COMPARTMENT MODEL WITH FIRST-ORDER ABSORPTION (ADVAN2)
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 #TBLN:      1
 #METH: First Order Conditional Estimation with Interaction
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
 #TERM:
0MINIMIZATION SUCCESSFUL
 NO. OF FUNCTION EVALUATIONS USED:      153
 NO. OF SIG. DIGITS IN FINAL EST.:  2.1

 ETABAR IS THE ARITHMETIC MEAN OF THE ETA-ESTIMATES,
 AND THE P-VALUE IS GIVEN FOR THE NULL HYPOTHESIS THAT THE TRUE MEAN IS 0.

 ETABAR:         9.8751E-03  2.1777E-03 -2.1777E-03
 SE:             1.9682E-02  3.7178E-03  3.7178E-03
 N:                      90          90          90

 P VAL.:         6.1586E-01  5.5804E-01  5.5804E-01

 ETASHRINKSD(%)  3.7422E+01  6.8366E+01  6.8366E+01
 ETASHRINKVR(%)  6.0840E+01  8.9993E+01  8.9993E+01
 EBVSHRINKSD(%)  3.7728E+01  6.8831E+01  6.8831E+01
 EBVSHRINKVR(%)  6.1222E+01  9.0285E+01  9.0285E+01
 RELATIVEINF(%)  2.3653E+01  1.0000E-10  1.0000E-10
 EPSSHRINKSD(%)  1.0000E+02  4.2110E+00
 EPSSHRINKVR(%)  1.0000E+02  8.2447E+00


 TOTAL DATA POINTS NORMALLY DISTRIBUTED (N):          641
 N*LOG(2PI) CONSTANT TO OBJECTIVE FUNCTION:    1178.0791995683903
 OBJECTIVE FUNCTION VALUE WITHOUT CONSTANT:   -185.99923087652945
 OBJECTIVE FUNCTION VALUE WITH CONSTANT:       992.07996869186081
 REPORTED OBJECTIVE FUNCTION DOES NOT CONTAIN CONSTANT

 TOTAL EFFECTIVE ETAS (NIND*NETA):                           270


 #TERE:
 Elapsed estimation  time in seconds:     1.12
 Elapsed covariance  time in seconds:     0.74
 Elapsed postprocess time in seconds:     0.02

 ********************               FIRST ORDER CONDITIONAL ESTIMATION WITH INTERACTION              ********************
 #OBJT:**************                       MINIMUM VALUE OF OBJECTIVE FUNCTION                      ********************
 #OBJV:********************************************     -185.999       **************************************************

 ********************               FIRST ORDER CONDITIONAL ESTIMATION WITH INTERACTION              ********************
 ********************                             FINAL PARAMETER ESTIMATE                           ********************

 THETA - VECTOR OF FIXED EFFECTS PARAMETERS   *********
         TH 1      TH 2      TH 3
         1.20E-01  1.52E-01  2.05E+00

 OMEGA - COV MATRIX FOR RANDOM EFFECTS - ETAS  ********
         ETA1      ETA2      ETA3
 ETA1
+        9.00E-02
 ETA2
+        0.00E+00  1.26E-02
 ETA3
+        0.00E+00  0.00E+00  1.26E-02

 SIGMA - COV MATRIX FOR RANDOM EFFECTS - EPSILONS  ****
         EPS1      EPS2
 EPS1
+        0.00E+00
 EPS2
+        0.00E+00  2.35E-01

 OMEGA - CORR MATRIX FOR RANDOM EFFECTS - ETAS  *******
         ETA1      ETA2      ETA3
 ETA1
+        3.00E-01
 ETA2
+        0.00E+00  1.12E-01
 ETA3
+        0.00E+00  0.00E+00  1.12E-01

 SIGMA - CORR MATRIX FOR RANDOM EFFECTS - EPSILONS  ***
         EPS1      EPS2
 EPS1
+        0.00E+00
 EPS2
+        0.00E+00  4.85E-01

 ********************               FIRST ORDER CONDITIONAL ESTIMATION WITH INTERACTION              ********************
 ********************                            STANDARD ERROR OF ESTIMATE                          ********************

 THETA - VECTOR OF FIXED EFFECTS PARAMETERS   *********
         TH 1      TH 2      TH 3
         8.95E-03  2.24E-02  3.52E-01

 OMEGA - COV MATRIX FOR RANDOM EFFECTS - ETAS  ********
         ETA1      ETA2      ETA3
 ETA1
+        2.04E-02
 ETA2
+       .........  9.12E-03
 ETA3
+       ......... .........  7.66E-03

 SIGMA - COV MATRIX FOR RANDOM EFFECTS - EPSILONS  ****
         EPS1      EPS2
 EPS1
+       .........
 EPS2
+       .........  4.05E-02

 OMEGA - CORR MATRIX FOR RANDOM EFFECTS - ETAS  *******
         ETA1      ETA2      ETA3
 ETA1
+        3.40E-02
 ETA2
+       .........  4.07E-02
 ETA3
+       ......... .........  3.42E-02

 SIGMA - CORR MATRIX FOR RANDOM EFFECTS - EPSILONS  ***
         EPS1      EPS2
 EPS1
+       .........
 EPS2
+       .........  4.18E-02

 ********************               FIRST ORDER CONDITIONAL ESTIMATION WITH INTERACTION              ********************
 ********************                          COVARIANCE MATRIX OF ESTIMATE                         ********************

            TH 1      TH 2      TH 3      OM11      OM12      OM13      OM22      OM23      OM33      SG11      SG12      SG22
 TH 1
+        8.02E-05
 TH 2
+        5.01E-05  5.04E-04
 TH 3
+        1.56E-03  7.37E-03  1.24E-01
 OM11
+        4.60E-05  6.29E-05  8.88E-04  4.17E-04
 OM12
+       ......... ......... ......... ......... .........
 OM13
+       ......... ......... ......... ......... ......... .........
 OM22
+        1.10E-06 -1.06E-04 -1.09E-03 -2.99E-05 ......... .........  8.32E-05
 OM23
+       ......... ......... ......... ......... ......... ......... ......... .........
 OM33
+        6.29E-06 -2.01E-05  4.96E-05 -1.52E-05 ......... .........  6.30E-05 .........  5.87E-05
 SG11
+       ......... ......... ......... ......... ......... ......... ......... ......... ......... .........
 SG12
+       ......... ......... ......... ......... ......... ......... ......... ......... ......... ......... .........
 SG22
+        5.25E-05  8.73E-04  1.16E-02  1.49E-04 ......... ......... -2.06E-04 ......... -4.38E-05 ......... .........  1.64E-03

 ********************               FIRST ORDER CONDITIONAL ESTIMATION WITH INTERACTION              ********************
 ********************                          CORRELATION MATRIX OF ESTIMATE                        ********************

            TH 1      TH 2      TH 3      OM11      OM12      OM13      OM22      OM23      OM33      SG11      SG12      SG22
 TH 1
+        8.95E-03
 TH 2
+        2.49E-01  2.24E-02
 TH 3
+        4.96E-01  9.34E-01  3.52E-01
 OM11
+        2.51E-01  1.37E-01  1.24E-01  2.04E-02
 OM12
+       ......... ......... ......... ......... .........
 OM13
+       ......... ......... ......... ......... ......... .........
 OM22
+        1.34E-02 -5.19E-01 -3.41E-01 -1.61E-01 ......... .........  9.12E-03
 OM23
+       ......... ......... ......... ......... ......... ......... ......... .........
 OM33
+        9.16E-02 -1.17E-01  1.84E-02 -9.74E-02 ......... .........  9.01E-01 .........  7.66E-03
 SG11
+       ......... ......... ......... ......... ......... ......... ......... ......... ......... .........
 SG12
+       ......... ......... ......... ......... ......... ......... ......... ......... ......... ......... .........
 SG22
+        1.45E-01  9.61E-01  8.14E-01  1.80E-01 ......... ......... -5.57E-01 ......... -1.41E-01 ......... .........  4.05E-02
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 Elapsed finaloutput time in seconds:     0.03
 #CPUT: Total CPU Time in Seconds,        2.078
