Tue Oct  8 20:03:49 EDT 2024
$PROBLEM    043 as 1CMT ADVAN13 with AMT in micrograms

$INPUT ROW ID NOMTIME TIME EVID CMT AMT DV FLAG STUDY
BLQ CYCLE DOSE PART PROFDAY PROFTIME WEIGHTB eff0

$DATA      xgxr12.csv IGNORE=@ IGNORE=(FLAG.NE.0) IGNORE(DOSE.LT.30)

$SUBROUTINE ADVAN13 TOL 9
$MODEL COMP=(DEPOT,DEFDOSE) COMP=(CENTRAL,DEFOBS)
;;       COMP=(PERIPH)

$PK
LTVKA=THETA(1)
LTVV2=THETA(2)
LTVCL=THETA(3)
;; LTVV3=THETA(4)
;; LTVQ=THETA(5)

MU_1=LTVKA
KA=EXP(MU_1+ETA(1))
MU_2=LTVV2
V2=EXP(MU_2+ETA(2))
MU_3=LTVCL
CL=EXP(MU_3+ETA(3))
;; MU_4=LTVV3
;; V3=EXP(MU_4+ETA(4))
;; MU_5 = LTVQ
;; Q =EXP(MU_5+ETA(5))
;; S2=V2/1000

$DES
DADT(1) = -KA*A(1)
DADT(2) = KA*A(1) - CL*A(2)/V2  ;;+ Q*(A(3)/V3-A(2)/V2)
;;DADT(3) = -Q*(A(3)/V3-A(2)/V2)

$ERROR
  IPRED=A(2)/V2
  IRES=DV-IPRED

  ;; IF (IPRED.GT.1) THEN
  ;;   W = SQRT(IPRED**2*SIGMA(1,1) + SIGMA(2,2))
  ;; ELSE
  ;;   W=1
  ;; ENDIF

  ;; IWRES=IRES/W
  Y=IPRED+IPRED*ERR(1)+ERR(2)

;-----------------------INITIAL ESTIMATES---------------------------------
$THETA  (-1)             ; LTVKA
$THETA  (9)             ; LTVV2
$THETA  (1)             ; LTVCL
;; $THETA  (5)          FIX   ; LTVV3
;; $THETA  (-1000) FIX             ; LTVQ

$OMEGA 0.1
$OMEGA 0.1
$OMEGA 0.1
;; $OMEGA 0 FIX
;; $OMEGA 0 FIX

$SIGMA 0.1
$SIGMA 0.1

$ESTIMATION METHOD=1 POSTHOC INTER MAXEVAL=9999 NSIG=2 SIGL=9
           PRINT=10 NOABORT MSFO=xgxr046.msf
;; $ESTIMATION METHOD=SAEM INTERACTION NOABORT NBURN=1000 NITER=1000 CTYPE=3 MAX=99999 NSIG=3 SEED=3442 PRINT=10 RANMETHOD=P MSFO=xgxr045.msf

;; $ESTIMATION METHOD=IMP INTERACTION EONLY=1 NITER=20 PRINT=1 ISAMPLE=5000 RANMETHOD=P

;$COV PRINT=E

$TABLE ROW LTVKA LTVV2 LTVCL KA V2 CL PRED IPRED Y NOPRINT FILE=xgxr046_res.txt
$TABLE ETAS(1:LAST) NOAPPEND NOPRINT FILE=xgxr046_etas.txt

NM-TRAN MESSAGES
 WARNINGS AND ERRORS (IF ANY) FOR PROBLEM    1
 (WARNING  2) NM-TRAN INFERS THAT THE DATA ARE POPULATION.

1NONLINEAR MIXED EFFECTS MODEL PROGRAM (NONMEM) VERSION 7.5.0
 ORIGINALLY DEVELOPED BY STUART BEAL, LEWIS SHEINER, AND ALISON BOECKMANN
 CURRENT DEVELOPERS ARE ROBERT BAUER, ICON DEVELOPMENT SOLUTIONS,
 AND ALISON BOECKMANN. IMPLEMENTATION, EFFICIENCY, AND STANDARDIZATION
 PERFORMED BY NOUS INFOSYSTEMS.
 PROBLEM NO.:         1
 043 as 1CMT ADVAN13 with AMT in micrograms
 TOT. NO. OF OBS RECS:      641
 TOT. NO. OF INDIVIDUALS:       90
 GENERAL NONLINEAR KINETICS MODEL WITH STIFF/NONSTIFF EQUATIONS (LSODA, ADVAN13)
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 #TBLN:      1
 #METH: First Order Conditional Estimation with Interaction
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
 #TERM:
0MINIMIZATION SUCCESSFUL
 NO. OF FUNCTION EVALUATIONS USED:      245
 NO. OF SIG. DIGITS IN FINAL EST.:  2.2

 ETABAR IS THE ARITHMETIC MEAN OF THE ETA-ESTIMATES,
 AND THE P-VALUE IS GIVEN FOR THE NULL HYPOTHESIS THAT THE TRUE MEAN IS 0.

 ETABAR:        -6.4101E-04 -1.1825E-02 -3.0324E-04
 SE:             3.1218E-03  3.4607E-02  3.6861E-02
 N:                      90          90          90

 P VAL.:         8.3731E-01  7.3257E-01  9.9344E-01

 ETASHRINKSD(%)  7.5941E+01  1.1029E+01  1.3601E+01
 ETASHRINKVR(%)  9.4212E+01  2.0842E+01  2.5352E+01
 EBVSHRINKSD(%)  7.5912E+01  1.0829E+01  1.4031E+01
 EBVSHRINKVR(%)  9.4198E+01  2.0486E+01  2.6093E+01
 RELATIVEINF(%)  5.1565E+00  7.0665E+01  7.3906E+01
 EPSSHRINKSD(%)  1.0920E+01  1.0920E+01
 EPSSHRINKVR(%)  2.0648E+01  2.0648E+01


 TOTAL DATA POINTS NORMALLY DISTRIBUTED (N):          641
 N*LOG(2PI) CONSTANT TO OBJECTIVE FUNCTION:    1178.0791995683903
 OBJECTIVE FUNCTION VALUE WITHOUT CONSTANT:   -1414.9881439836311
 OBJECTIVE FUNCTION VALUE WITH CONSTANT:      -236.90894441524074
 REPORTED OBJECTIVE FUNCTION DOES NOT CONTAIN CONSTANT

 TOTAL EFFECTIVE ETAS (NIND*NETA):                           270


 #TERE:
 Elapsed estimation  time in seconds:    62.73
 Elapsed postprocess time in seconds:     0.56

 ********************               FIRST ORDER CONDITIONAL ESTIMATION WITH INTERACTION              ********************
 #OBJT:**************                       MINIMUM VALUE OF OBJECTIVE FUNCTION                      ********************
 #OBJV:********************************************    -1414.988       **************************************************

 ********************               FIRST ORDER CONDITIONAL ESTIMATION WITH INTERACTION              ********************
 ********************                             FINAL PARAMETER ESTIMATE                           ********************

 THETA - VECTOR OF FIXED EFFECTS PARAMETERS   *********
         TH 1      TH 2      TH 3
         1.12E+00  1.15E+01  9.83E+00

 OMEGA - COV MATRIX FOR RANDOM EFFECTS - ETAS  ********
         ETA1      ETA2      ETA3
 ETA1
+        1.53E-02
 ETA2
+        0.00E+00  1.38E-01
 ETA3
+        0.00E+00  0.00E+00  1.66E-01

 SIGMA - COV MATRIX FOR RANDOM EFFECTS - EPSILONS  ****
         EPS1      EPS2
 EPS1
+        9.15E-02
 EPS2
+        0.00E+00  2.79E-03

 OMEGA - CORR MATRIX FOR RANDOM EFFECTS - ETAS  *******
         ETA1      ETA2      ETA3
 ETA1
+        1.24E-01
 ETA2
+        0.00E+00  3.71E-01
 ETA3
+        0.00E+00  0.00E+00  4.07E-01

 SIGMA - CORR MATRIX FOR RANDOM EFFECTS - EPSILONS  ***
         EPS1      EPS2
 EPS1
+        3.03E-01
 EPS2
+        0.00E+00  5.28E-02
 Elapsed finaloutput time in seconds:     0.03
 #CPUT: Total CPU Time in Seconds,       63.443
